;Model Desc: basic two cmt additive shift trt vc linear weight cl random vc cl q
;Project Name: raltest
;Project ID: NO PROJECT DESCRIPTION

;Project ID: NO PROJECT DESCRIPTION

$PROB RUN# analysis24
$INPUT C ID TREAT TIME DV AMT EVID sex race weight height age HC
$DATA RAL_FOR_NONMEM.CSV IGNORE=C
$SUBROUTINES ADVAN4 TRANS4
$PK
   TVCL=THETA(1)
   CL=TVCL*EXP(ETA(1))+THETA(6)*TREAT
   TVV2=THETA(2)
   V2=TVV2*EXP(ETA(2))+THETA(7)*weight
   TVQ=THETA(3)
   Q=TVQ*EXP(ETA(3))
   TVV3=THETA(4)
   V3=TVV3
   TVKA=THETA(5)
   KA=TVKA*EXP(ETA(4))
   S2=V2

$ERROR
   Y = F + F*ERR(1)
 IPRE=F

$EST METHOD=1 INTERACTION PRINT=5 MAX=9999 SIG=3    MSFO=analysis24.msf
$THETA
  (0, 104);[CL]
  (0, 102);[V2]
  (0, 14.5);[Q]
  (0, 668);[V3]
  (0, 0.481);[KA]
  5;[trt]
  0.1;[wt]
$OMEGA
  0.004 ;[P] omega(1,1)
  0.004 ;[P] omega(2,2)
  0.004 ;[P] omega(3,3)
  0.004 ;[P] omega(4,4)
$SIGMA
  0.04 ;[P] sigma(1,1)
$COV
$TABLE ID TIME ONEHEADER NOPRINT FILE=analysis24.tab
