Thu 12/15/2016
08:37 PM
;Model Desc: basic one cmt random ka v cl
;Project Name: raltest
;Project ID: NO PROJECT DESCRIPTION

;Project ID: NO PROJECT DESCRIPTION

$PROB RUN# analysis1
$INPUT C  ID TREAT TIME DV AMT EVID sex race weight height age HC
$DATA RAL_FOR_NONMEM.CSV IGNORE=C
$SUBROUTINES ADVAN2 TRANS2
$PK
   TVCL=THETA(1)
   CL=TVCL*EXP(ETA(1))
   TVV=THETA(2)
   V=TVV*EXP(ETA(2))
   TVKA=THETA(3)
   KA=TVKA*EXP(ETA(3))
   S2=V

$ERROR
   Y = F + F*ERR(1)+ERR(2)
 IPRE=F

$EST METHOD=1 INTERACTION PRINT=5 MAX=9999 SIG=3    MSFO=analysis1.msf
$THETA
  (0, 64);[CL]
  (0, 281);[V]
  (0, .65);[KA]
$OMEGA
  0.04 ;[P] omega(1,1)
  0.04 ;[P] omega(2,2)
  0.04 ;[P] omega(3,3)
$SIGMA
  0.04 ;[P] sigma(1,1)
  0.04 ;[A] sigma(2,2)
$COV
$TABLE ID TIME ONEHEADER NOPRINT FILE=analysis1.tab

NM-TRAN MESSAGES
 WARNINGS AND ERRORS (IF ANY) FOR PROBLEM    1
 (WARNING  2) NM-TRAN INFERS THAT THE DATA ARE POPULATION.

1NONLINEAR MIXED EFFECTS MODEL PROGRAM (NONMEM) VERSION 7.3.0
 ORIGINALLY DEVELOPED BY STUART BEAL, LEWIS SHEINER, AND ALISON BOECKMANN
 CURRENT DEVELOPERS ARE ROBERT BAUER, ICON DEVELOPMENT SOLUTIONS,
 AND ALISON BOECKMANN. IMPLEMENTATION, EFFICIENCY, AND STANDARDIZATION
 PERFORMED BY NOUS INFOSYSTEMS.
 PROBLEM NO.:         1
 RUN# analysis1
 TOT. NO. OF OBS RECS:      311
 TOT. NO. OF INDIVIDUALS:     12
 ONE COMPARTMENT MODEL WITH FIRST-ORDER ABSORPTION (ADVAN2)
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 #TBLN:      1
 #METH: First Order Conditional Estimation with Interaction
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
 #TERM:
0MINIMIZATION SUCCESSFUL
 NO. OF FUNCTION EVALUATIONS USED:      408
 NO. OF SIG. DIGITS IN FINAL EST.:  3.7

 ETABAR IS THE ARITHMETIC MEAN OF THE ETA-ESTIMATES,
 AND THE P-VALUE IS GIVEN FOR THE NULL HYPOTHESIS THAT THE TRUE MEAN IS 0.

 ETABAR:        -8.2183E-03  2.9899E-02  3.5445E-02
 SE:             1.5076E-01  1.4505E-01  1.7249E-01
 N:                      12          12          12

 P VAL.:         9.5653E-01  8.3669E-01  8.3719E-01

 ETAshrink(%):   1.0000E-10  1.0775E+01  2.4148E+01
 EBVshrink(%):   2.4567E+00  1.3924E+01  1.8931E+01
 EPSshrink(%):   2.4551E+00  2.4551E+00

 #TERE:
 Elapsed estimation time in seconds:     6.64
 Elapsed covariance time in seconds:     2.12

 ********************               FIRST ORDER CONDITIONAL ESTIMATION WITH INTERACTION              ********************
 #OBJT:**************                       MINIMUM VALUE OF OBJECTIVE FUNCTION                      ********************
 #OBJV:********************************************     3380.097       **************************************************

 ********************               FIRST ORDER CONDITIONAL ESTIMATION WITH INTERACTION              ********************
 ********************                             FINAL PARAMETER ESTIMATE                           ********************

 THETA - VECTOR OF FIXED EFFECTS PARAMETERS   *********
         TH 1      TH 2      TH 3
         1.20E+02  2.50E+02  1.09E+00

 OMEGA - COV MATRIX FOR RANDOM EFFECTS - ETAS  ********
            ETA1      ETA2      ETA3
 ETA1
+        2.88E-01
 ETA2
+        0.00E+00  3.46E-01
 ETA3
+        0.00E+00  0.00E+00  6.77E-01

 SIGMA - COV MATRIX FOR RANDOM EFFECTS - EPSILONS  ****
            EPS1      EPS2
 EPS1
+        6.21E-01
 EPS2
+        0.00E+00  9.65E+01

 OMEGA - CORR MATRIX FOR RANDOM EFFECTS - ETAS  *******
            ETA1      ETA2      ETA3
 ETA1
+        5.36E-01
 ETA2
+        0.00E+00  5.88E-01
 ETA3
+        0.00E+00  0.00E+00  8.23E-01

 SIGMA - CORR MATRIX FOR RANDOM EFFECTS - EPSILONS  ***
            EPS1      EPS2
 EPS1
+        7.88E-01
 EPS2
+        0.00E+00  9.82E+00

 ********************               FIRST ORDER CONDITIONAL ESTIMATION WITH INTERACTION              ********************
 ********************                            STANDARD ERROR OF ESTIMATE                          ********************

 THETA - VECTOR OF FIXED EFFECTS PARAMETERS   *********
         TH 1      TH 2      TH 3
         1.75E+01  2.98E+01  2.16E-01

 OMEGA - COV MATRIX FOR RANDOM EFFECTS - ETAS  ********
            ETA1      ETA2      ETA3
 ETA1
+        1.03E-01
 ETA2
+       .........  1.73E-01
 ETA3
+       ......... .........  4.89E-01

 SIGMA - COV MATRIX FOR RANDOM EFFECTS - EPSILONS  ****
            EPS1      EPS2
 EPS1
+        9.29E-02
 EPS2
+       .........  2.58E+01

 OMEGA - CORR MATRIX FOR RANDOM EFFECTS - ETAS  *******
            ETA1      ETA2      ETA3
 ETA1
+        9.58E-02
 ETA2
+       .........  1.47E-01
 ETA3
+       ......... .........  2.97E-01

 SIGMA - CORR MATRIX FOR RANDOM EFFECTS - EPSILONS  ***
            EPS1      EPS2
 EPS1
+        5.90E-02
 EPS2
+       .........  1.31E+00

 ********************               FIRST ORDER CONDITIONAL ESTIMATION WITH INTERACTION              ********************
 ********************                          COVARIANCE MATRIX OF ESTIMATE                         ********************

            TH 1      TH 2      TH 3      OM11      OM12      OM13      OM22      OM23      OM33      SG11      SG12      SG22
 TH 1
+        3.07E+02
 TH 2
+        4.39E+02  8.89E+02
 TH 3
+        8.60E-01  1.11E+00  4.67E-02
 OM11
+       -3.87E-01 -1.82E+00 -2.71E-04  1.06E-02
 OM12
+       ......... ......... ......... ......... .........
 OM13
+       ......... ......... ......... ......... ......... .........
 OM22
+       -8.85E-01 -2.97E+00 -1.78E-03  1.56E-02 ......... .........  2.98E-02
 OM23
+       ......... ......... ......... ......... ......... ......... ......... .........
 OM33
+        3.93E+00  3.82E+00  6.82E-02  1.44E-02 ......... .........  3.68E-02 .........  2.39E-01
 SG11
+       -7.33E-01 -1.18E+00 -1.29E-02  4.20E-03 ......... .........  9.67E-03 ......... -7.63E-03  8.64E-03
 SG12
+       ......... ......... ......... ......... ......... ......... ......... ......... ......... ......... .........
 SG22
+       -9.23E+01  8.98E+01  1.79E+00 -9.06E-01 ......... ......... -1.57E+00 ......... -2.66E+00 -4.90E-01 .........  6.66E+02

 ********************               FIRST ORDER CONDITIONAL ESTIMATION WITH INTERACTION              ********************
 ********************                          CORRELATION MATRIX OF ESTIMATE                        ********************

            TH 1      TH 2      TH 3      OM11      OM12      OM13      OM22      OM23      OM33      SG11      SG12      SG22
 TH 1
+        1.75E+01
 TH 2
+        8.40E-01  2.98E+01
 TH 3
+        2.27E-01  1.72E-01  2.16E-01
 OM11
+       -2.15E-01 -5.94E-01 -1.22E-02  1.03E-01
 OM12
+       ......... ......... ......... ......... .........
 OM13
+       ......... ......... ......... ......... ......... .........
 OM22
+       -2.93E-01 -5.78E-01 -4.77E-02  8.82E-01 ......... .........  1.73E-01
 OM23
+       ......... ......... ......... ......... ......... ......... ......... .........
 OM33
+        4.59E-01  2.62E-01  6.45E-01  2.87E-01 ......... .........  4.36E-01 .........  4.89E-01
 SG11
+       -4.50E-01 -4.26E-01 -6.43E-01  4.40E-01 ......... .........  6.03E-01 ......... -1.68E-01  9.29E-02
 SG12
+       ......... ......... ......... ......... ......... ......... ......... ......... ......... ......... .........
 SG22
+       -2.04E-01  1.17E-01  3.21E-01 -3.42E-01 ......... ......... -3.53E-01 ......... -2.11E-01 -2.04E-01 .........  2.58E+01
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 #CPUT: Total CPU Time in Seconds,        8.391
