Fri 01/20/2017
12:10 AM
;Model Desc: two cmt additive shift trt cl
;Project Name: raltest
;Project ID: NO PROJECT DESCRIPTION

;Project ID: NO PROJECT DESCRIPTION

$PROB RUN# analysis11
$INPUT C ID TREAT TIME DV AMT EVID sex race weight height age HC
$DATA RAL_FOR_NONMEM.CSV IGNORE=C
$SUBROUTINES ADVAN4 TRANS4
$PK
   TVCL=THETA(1)
   CL=TVCL*EXP(ETA(1))+THETA(6)*TREAT
   TVV2=THETA(2)
   V2=TVV2*EXP(ETA(2))
   TVQ=THETA(3)
   Q=TVQ*EXP(ETA(3))
   TVV3=THETA(4)
   V3=TVV3
   TVKA=THETA(5)
   KA=TVKA*EXP(ETA(4))
   S2=V2

$ERROR
   Y = F + F*ERR(1)
 IPRE=F
 W1= 1
 W2= F
 IRES= DV-IPRE
 IWRE=IRES/(W1+W2)

$EST METHOD=1 INTERACTION PRINT=5 MAX=9999 SIG=3    MSFO=analysis11.msf
$THETA
  (0, 104);[CL]
  (0, 102);[V2]
  (0, 14.5);[Q]
  (0, 668);[V3]
  (0, 0.481);[KA]
  5;[trt]
$OMEGA
  0.04 ;[P] omega(1,1)
  0.04 ;[P] omega(2,2)
  0.04 ;[P] omega(3,3)
  0.04 ;[P] omega(4,4)
$SIGMA
  0.04 ;[P] sigma(1,1)
$COV
$TABLE ID TIME IPRE ONEHEADER NOPRINT FILE=analysis11.tab
$TABLE ID TIME CL V2 Q V3 KA ONEHEADER NOPRINT FILE=PATABanalysis11
$TABLE ID ONEHEADER NOPRINT FILE=COTABanalysis11
$TABLE ID ONEHEADER NOPRINT FILE=CATABanalysis11
$TABLE ID IPRE ONEHEADER NOPRINT FILE=SDTABanalysis11
$TABLE ID CL V2 Q V3 KA FIRSTONLY NOAPPEND NOPRINT FILE=analysis11.par
$TABLE ID ETA1 ETA2 ETA3 FIRSTONLY NOAPPEND NOPRINT FILE=analysis11.eta
$SCAT DV VS PRED UNIT
$SCAT WRES VS PRED

NM-TRAN MESSAGES
 WARNINGS AND ERRORS (IF ANY) FOR PROBLEM    1
 (WARNING  2) NM-TRAN INFERS THAT THE DATA ARE POPULATION.

1NONLINEAR MIXED EFFECTS MODEL PROGRAM (NONMEM) VERSION 7.3.0
 ORIGINALLY DEVELOPED BY STUART BEAL, LEWIS SHEINER, AND ALISON BOECKMANN
 CURRENT DEVELOPERS ARE ROBERT BAUER, ICON DEVELOPMENT SOLUTIONS,
 AND ALISON BOECKMANN. IMPLEMENTATION, EFFICIENCY, AND STANDARDIZATION
 PERFORMED BY NOUS INFOSYSTEMS.
 PROBLEM NO.:         1
 RUN# analysis11
 TOT. NO. OF OBS RECS:      311
 TOT. NO. OF INDIVIDUALS:     12
 TWO COMPARTMENT MODEL WITH FIRST-ORDER ABSORPTION (ADVAN4)
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 #TBLN:      1
 #METH: First Order Conditional Estimation with Interaction
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
 #TERM:
0MINIMIZATION SUCCESSFUL
 NO. OF FUNCTION EVALUATIONS USED:      323
 NO. OF SIG. DIGITS IN FINAL EST.:  3.5

 ETABAR IS THE ARITHMETIC MEAN OF THE ETA-ESTIMATES,
 AND THE P-VALUE IS GIVEN FOR THE NULL HYPOTHESIS THAT THE TRUE MEAN IS 0.

 ETABAR:        -7.0919E-03  2.6709E-02 -2.3738E-02  1.3404E-02
 SE:             1.4680E-01  1.4845E-01  1.1929E-01  4.8315E-02
 N:                      12          12          12          12

 P VAL.:         9.6147E-01  8.5722E-01  8.4227E-01  7.8145E-01

 ETAshrink(%):   1.0000E-10  1.3736E+01  3.5790E+00  1.7391E+01
 EBVshrink(%):   2.4986E+00  1.4505E+01  1.0372E+01  2.3914E+01
 EPSshrink(%):   3.3437E+00

 #TERE:
 Elapsed estimation time in seconds:     3.49
 Elapsed covariance time in seconds:     4.26

 ********************               FIRST ORDER CONDITIONAL ESTIMATION WITH INTERACTION              ********************
 #OBJT:**************                       MINIMUM VALUE OF OBJECTIVE FUNCTION                      ********************
 #OBJV:********************************************     3145.104       **************************************************

 ********************               FIRST ORDER CONDITIONAL ESTIMATION WITH INTERACTION              ********************
 ********************                             FINAL PARAMETER ESTIMATE                           ********************

 THETA - VECTOR OF FIXED EFFECTS PARAMETERS   *********
         TH 1      TH 2      TH 3      TH 4      TH 5      TH 6
         7.66E+01  9.59E+01  1.15E+01  3.74E+02  5.97E-01  5.08E+01

 OMEGA - COV MATRIX FOR RANDOM EFFECTS - ETAS  ********
            ETA1      ETA2      ETA3      ETA4
 ETA1
+        2.74E-01
 ETA2
+        0.00E+00  3.88E-01
 ETA3
+        0.00E+00  0.00E+00  2.00E-01
 ETA4
+        0.00E+00  0.00E+00  0.00E+00  4.48E-02

 SIGMA - COV MATRIX FOR RANDOM EFFECTS - EPSILONS  ****
            EPS1
 EPS1
+        4.22E-01

 OMEGA - CORR MATRIX FOR RANDOM EFFECTS - ETAS  *******
            ETA1      ETA2      ETA3      ETA4
 ETA1
+        5.24E-01
 ETA2
+        0.00E+00  6.23E-01
 ETA3
+        0.00E+00  0.00E+00  4.48E-01
 ETA4
+        0.00E+00  0.00E+00  0.00E+00  2.12E-01

 SIGMA - CORR MATRIX FOR RANDOM EFFECTS - EPSILONS  ***
            EPS1
 EPS1
+        6.49E-01

 ********************               FIRST ORDER CONDITIONAL ESTIMATION WITH INTERACTION              ********************
 ********************                            STANDARD ERROR OF ESTIMATE                          ********************

 THETA - VECTOR OF FIXED EFFECTS PARAMETERS   *********
         TH 1      TH 2      TH 3      TH 4      TH 5      TH 6
         1.40E+01  2.45E+01  3.13E+00  1.48E+02  7.85E-02  6.40E+00

 OMEGA - COV MATRIX FOR RANDOM EFFECTS - ETAS  ********
            ETA1      ETA2      ETA3      ETA4
 ETA1
+        9.15E-02
 ETA2
+       .........  2.14E-01
 ETA3
+       ......... .........  1.53E-01
 ETA4
+       ......... ......... .........  3.71E-02

 SIGMA - COV MATRIX FOR RANDOM EFFECTS - EPSILONS  ****
            EPS1
 EPS1
+        5.38E-02

 OMEGA - CORR MATRIX FOR RANDOM EFFECTS - ETAS  *******
            ETA1      ETA2      ETA3      ETA4
 ETA1
+        8.74E-02
 ETA2
+       .........  1.72E-01
 ETA3
+       ......... .........  1.70E-01
 ETA4
+       ......... ......... .........  8.76E-02

 SIGMA - CORR MATRIX FOR RANDOM EFFECTS - EPSILONS  ***
            EPS1
 EPS1
+        4.14E-02
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 #CPUT: Total CPU Time in Seconds,        7.563
