Sun 01/15/2017
06:07 PM
;Model Desc: basic two cmt additive shift trt cl random vc cl q
;Project Name: raltest
;Project ID: NO PROJECT DESCRIPTION

;Project ID: NO PROJECT DESCRIPTION

$PROB RUN# analysis12
$INPUT C ID TREAT TIME DV AMT EVID sex race weight height age HC
$DATA RAL_FOR_NONMEM.CSV IGNORE=C
$SUBROUTINES ADVAN4 TRANS4
$PK
   TVCL=THETA(1)
   CL=TVCL*EXP(ETA(1))
   TVV2=THETA(2)
   V2=TVV2*EXP(ETA(2))
   TVQ=THETA(3)
   Q=TVQ*EXP(ETA(3))
   TVV3=THETA(4)
   V3=TVV3
   TVKA=THETA(5)
   KA=TVKA*EXP(ETA(4))+THETA(6)*TREAT
   S2=V2

$ERROR
   Y = F + F*ERR(1)
 IPRE=F
 W1= 1
 W2= F
 IRES= DV-IPRE
 IWRE=IRES/(W1+W2)

$EST METHOD=1 INTERACTION PRINT=5 MAX=9999 SIG=3    MSFO=analysis12.msf
$THETA
  (0, 104);[CL]
  (0, 102);[V2]
  (0, 14.5);[Q]
  (0, 668);[V3]
  (0, 0.481);[KA]
  0.1;[trt]
$OMEGA
  0.04 ;[P] omega(1,1)
  0.04 ;[P] omega(2,2)
  0.04 ;[P] omega(3,3)
  0.04 ;[P] omega(4,4)
$SIGMA
  0.04 ;[P] sigma(1,1)
$COV
$TABLE ID TIME IPRE ONEHEADER NOPRINT FILE=analysis12.tab
$TABLE ID TIME CL V2 Q V3 KA ONEHEADER NOPRINT FILE=PATABanalysis12
$TABLE ID ONEHEADER NOPRINT FILE=COTABanalysis12
$TABLE ID ONEHEADER NOPRINT FILE=CATABanalysis12
$TABLE ID IPRE ONEHEADER NOPRINT FILE=SDTABanalysis12
$TABLE ID CL V2 Q V3 KA FIRSTONLY NOAPPEND NOPRINT FILE=analysis12.par
$TABLE ID ETA1 ETA2 ETA3 FIRSTONLY NOAPPEND NOPRINT FILE=analysis12.eta
$SCAT DV VS PRED UNIT
$SCAT WRES VS PRED

NM-TRAN MESSAGES
 WARNINGS AND ERRORS (IF ANY) FOR PROBLEM    1
 (WARNING  2) NM-TRAN INFERS THAT THE DATA ARE POPULATION.

1NONLINEAR MIXED EFFECTS MODEL PROGRAM (NONMEM) VERSION 7.3.0
 ORIGINALLY DEVELOPED BY STUART BEAL, LEWIS SHEINER, AND ALISON BOECKMANN
 CURRENT DEVELOPERS ARE ROBERT BAUER, ICON DEVELOPMENT SOLUTIONS,
 AND ALISON BOECKMANN. IMPLEMENTATION, EFFICIENCY, AND STANDARDIZATION
 PERFORMED BY NOUS INFOSYSTEMS.
 PROBLEM NO.:         1
 RUN# analysis12
 TOT. NO. OF OBS RECS:      311
 TOT. NO. OF INDIVIDUALS:     12
 TWO COMPARTMENT MODEL WITH FIRST-ORDER ABSORPTION (ADVAN4)
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 #TBLN:      1
 #METH: First Order Conditional Estimation with Interaction
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
 #TERM:
0MINIMIZATION SUCCESSFUL
 NO. OF FUNCTION EVALUATIONS USED:      462
 NO. OF SIG. DIGITS IN FINAL EST.:  3.3

 ETABAR IS THE ARITHMETIC MEAN OF THE ETA-ESTIMATES,
 AND THE P-VALUE IS GIVEN FOR THE NULL HYPOTHESIS THAT THE TRUE MEAN IS 0.

 ETABAR:        -6.0153E-03  9.3296E-03 -3.5108E-02  7.1369E-03
 SE:             1.7388E-01  2.1831E-01  1.9361E-01  8.4692E-02
 N:                      12          12          12          12

 P VAL.:         9.7240E-01  9.6591E-01  8.5611E-01  9.3284E-01

 ETAshrink(%):   1.0000E-10  2.1078E+00  6.1120E-03  7.4751E+00
 EBVshrink(%):   1.4740E+00  3.8748E+00  4.5757E+00  1.1945E+01
 EPSshrink(%):   3.8528E+00

 #TERE:
 Elapsed estimation time in seconds:     5.64
 Elapsed covariance time in seconds:     4.60

 ********************               FIRST ORDER CONDITIONAL ESTIMATION WITH INTERACTION              ********************
 #OBJT:**************                       MINIMUM VALUE OF OBJECTIVE FUNCTION                      ********************
 #OBJV:********************************************     3171.470       **************************************************

 ********************               FIRST ORDER CONDITIONAL ESTIMATION WITH INTERACTION              ********************
 ********************                             FINAL PARAMETER ESTIMATE                           ********************

 THETA - VECTOR OF FIXED EFFECTS PARAMETERS   *********
         TH 1      TH 2      TH 3      TH 4      TH 5      TH 6
         1.04E+02  1.40E+02  1.52E+01  6.67E+02  3.19E-01  7.94E-01

 OMEGA - COV MATRIX FOR RANDOM EFFECTS - ETAS  ********
            ETA1      ETA2      ETA3      ETA4
 ETA1
+        3.75E-01
 ETA2
+        0.00E+00  6.51E-01
 ETA3
+        0.00E+00  0.00E+00  4.91E-01
 ETA4
+        0.00E+00  0.00E+00  0.00E+00  1.10E-01

 SIGMA - COV MATRIX FOR RANDOM EFFECTS - EPSILONS  ****
            EPS1
 EPS1
+        4.33E-01

 OMEGA - CORR MATRIX FOR RANDOM EFFECTS - ETAS  *******
            ETA1      ETA2      ETA3      ETA4
 ETA1
+        6.13E-01
 ETA2
+        0.00E+00  8.07E-01
 ETA3
+        0.00E+00  0.00E+00  7.01E-01
 ETA4
+        0.00E+00  0.00E+00  0.00E+00  3.31E-01

 SIGMA - CORR MATRIX FOR RANDOM EFFECTS - EPSILONS  ***
            EPS1
 EPS1
+        6.58E-01

 ********************               FIRST ORDER CONDITIONAL ESTIMATION WITH INTERACTION              ********************
 ********************                            STANDARD ERROR OF ESTIMATE                          ********************

 THETA - VECTOR OF FIXED EFFECTS PARAMETERS   *********
         TH 1      TH 2      TH 3      TH 4      TH 5      TH 6
         1.83E+01  3.90E+01  3.99E+00  1.79E+02  5.15E-02  2.71E-01

 OMEGA - COV MATRIX FOR RANDOM EFFECTS - ETAS  ********
            ETA1      ETA2      ETA3      ETA4
 ETA1
+        1.31E-01
 ETA2
+       .........  2.44E-01
 ETA3
+       ......... .........  1.61E-01
 ETA4
+       ......... ......... .........  5.38E-02

 SIGMA - COV MATRIX FOR RANDOM EFFECTS - EPSILONS  ****
            EPS1
 EPS1
+        6.11E-02

 OMEGA - CORR MATRIX FOR RANDOM EFFECTS - ETAS  *******
            ETA1      ETA2      ETA3      ETA4
 ETA1
+        1.07E-01
 ETA2
+       .........  1.51E-01
 ETA3
+       ......... .........  1.15E-01
 ETA4
+       ......... ......... .........  8.12E-02

 SIGMA - CORR MATRIX FOR RANDOM EFFECTS - EPSILONS  ***
            EPS1
 EPS1
+        4.65E-02
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 #CPUT: Total CPU Time in Seconds,       10.172
