Fri 01/20/2017
12:28 AM
;Model Desc: basic two cmt additive shift vc random vc cl q
;Project Name: raltest
;Project ID: NO PROJECT DESCRIPTION

;Project ID: NO PROJECT DESCRIPTION

$PROB RUN# analysis13
$INPUT C ID TREAT TIME DV AMT EVID sex race weight height age HC
$DATA RAL_FOR_NONMEM.CSV IGNORE=C
$SUBROUTINES ADVAN4 TRANS4
$PK
   TVCL=THETA(1)
   CL=TVCL*EXP(ETA(1))
   TVV2=THETA(2)
   V2=TVV2*EXP(ETA(2))+THETA(6)*TREAT
   TVQ=THETA(3)
   Q=TVQ*EXP(ETA(3))
   TVV3=THETA(4)
   V3=TVV3
   TVKA=THETA(5)
   KA=TVKA*EXP(ETA(4))
   S2=V2

$ERROR
   Y = F + F*ERR(1)
 IPRE=F

$EST METHOD=1 INTERACTION PRINT=5 MAX=9999 SIG=3    MSFO=analysis13.msf
$THETA
  (0, 104);[CL]
  (0, 102);[V2]
  (0, 14.5);[Q]
  (0, 668);[V3]
  (0, 0.481);[KA]
  -50;[trt]
$OMEGA
  0.04 ;[P] omega(1,1)
  0.04 ;[P] omega(2,2)
  0.04 ;[P] omega(3,3)
  0.04 ;[P] omega(4,4)
$SIGMA
  0.04 ;[P] sigma(1,1)
$COV
$TABLE ID TIME ONEHEADER NOPRINT FILE=analysis13.tab

NM-TRAN MESSAGES
 WARNINGS AND ERRORS (IF ANY) FOR PROBLEM    1
 (WARNING  2) NM-TRAN INFERS THAT THE DATA ARE POPULATION.

1NONLINEAR MIXED EFFECTS MODEL PROGRAM (NONMEM) VERSION 7.3.0
 ORIGINALLY DEVELOPED BY STUART BEAL, LEWIS SHEINER, AND ALISON BOECKMANN
 CURRENT DEVELOPERS ARE ROBERT BAUER, ICON DEVELOPMENT SOLUTIONS,
 AND ALISON BOECKMANN. IMPLEMENTATION, EFFICIENCY, AND STANDARDIZATION
 PERFORMED BY NOUS INFOSYSTEMS.
 PROBLEM NO.:         1
 RUN# analysis13
 TOT. NO. OF OBS RECS:      311
 TOT. NO. OF INDIVIDUALS:     12
 TWO COMPARTMENT MODEL WITH FIRST-ORDER ABSORPTION (ADVAN4)
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 #TBLN:      1
 #METH: First Order Conditional Estimation with Interaction
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
0PRED EXIT CODE = 1
0INDIVIDUAL NO.       6   ID= 6.00700000000000E+03   (WITHIN-INDIVIDUAL) DATA REC NO.  15
 THETA=
  1.04E+02   1.02E+02   1.45E+01   6.68E+02   4.81E-01  -5.00E+01
 ETA=
 -1.35E+00  -7.14E-01  -1.08E+00   3.92E-01
 OCCURS DURING SEARCH FOR ETA AT A NONZERO VALUE OF ETA
 ERROR IN TRANS4 ROUTINE: V2  IS NEGATIVE
0PROGRAM TERMINATED BY OBJ
 MESSAGE ISSUED FROM ESTIMATION STEP
 AT INITIAL OBJ. FUNCTION EVALUATION

 #TERM:

 #TERE:
 Elapsed estimation time in seconds:     0.04
 #CPUT: Total CPU Time in Seconds,        0.078
