Thu 12/15/2016
08:38 PM
;Model Desc: basic one cmt random ka v
;Project Name: raltest
;Project ID: NO PROJECT DESCRIPTION

;Project ID: NO PROJECT DESCRIPTION

$PROB RUN# analysis2
$INPUT C  ID TREAT TIME DV AMT EVID sex race weight height age HC
$DATA RAL_FOR_NONMEM.CSV IGNORE=C
$SUBROUTINES ADVAN2 TRANS2
$PK
   TVCL=THETA(1)
   CL=TVCL
   TVV=THETA(2)
   V=TVV*EXP(ETA(1))
   TVKA=THETA(3)
   KA=TVKA*EXP(ETA(2))
   S2=V

$ERROR
   Y = F + F*ERR(1)+ERR(2)
 IPRE=F

$EST METHOD=1 INTERACTION PRINT=5 MAX=9999 SIG=3    MSFO=analysis2.msf
$THETA
  (0, 64);[CL]
  (0, 281);[V]
  (0, .65);[KA]
$OMEGA
  0.04 ;[P] omega(1,1)
  0.04 ;[P] omega(2,2)

$SIGMA
  0.04 ;[P] sigma(1,1)
  0.04 ;[A] sigma(2,2)
$COV
$TABLE ID TIME ONEHEADER NOPRINT FILE=analysis2.tab

NM-TRAN MESSAGES
 WARNINGS AND ERRORS (IF ANY) FOR PROBLEM    1
 (WARNING  2) NM-TRAN INFERS THAT THE DATA ARE POPULATION.

1NONLINEAR MIXED EFFECTS MODEL PROGRAM (NONMEM) VERSION 7.3.0
 ORIGINALLY DEVELOPED BY STUART BEAL, LEWIS SHEINER, AND ALISON BOECKMANN
 CURRENT DEVELOPERS ARE ROBERT BAUER, ICON DEVELOPMENT SOLUTIONS,
 AND ALISON BOECKMANN. IMPLEMENTATION, EFFICIENCY, AND STANDARDIZATION
 PERFORMED BY NOUS INFOSYSTEMS.
 PROBLEM NO.:         1
 RUN# analysis2
 TOT. NO. OF OBS RECS:      311
 TOT. NO. OF INDIVIDUALS:     12
 ONE COMPARTMENT MODEL WITH FIRST-ORDER ABSORPTION (ADVAN2)
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 #TBLN:      1
 #METH: First Order Conditional Estimation with Interaction
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
 #TERM:
0MINIMIZATION SUCCESSFUL
 NO. OF FUNCTION EVALUATIONS USED:      336
 NO. OF SIG. DIGITS IN FINAL EST.:  3.2

 ETABAR IS THE ARITHMETIC MEAN OF THE ETA-ESTIMATES,
 AND THE P-VALUE IS GIVEN FOR THE NULL HYPOTHESIS THAT THE TRUE MEAN IS 0.

 ETABAR:        -1.5082E-02 -1.3632E-01
 SE:             3.1287E-02  4.8295E-01
 N:                      12          12

 P VAL.:         6.2975E-01  7.7774E-01

 ETAshrink(%):   3.0936E+01  2.0818E+01
 EBVshrink(%):   3.2204E+01  2.1361E+01
 EPSshrink(%):   8.9848E-01  8.9848E-01

 #TERE:
 Elapsed estimation time in seconds:     3.61
 Elapsed covariance time in seconds:     1.48

 ********************               FIRST ORDER CONDITIONAL ESTIMATION WITH INTERACTION              ********************
 #OBJT:**************                       MINIMUM VALUE OF OBJECTIVE FUNCTION                      ********************
 #OBJV:********************************************     3510.184       **************************************************

 ********************               FIRST ORDER CONDITIONAL ESTIMATION WITH INTERACTION              ********************
 ********************                             FINAL PARAMETER ESTIMATE                           ********************

 THETA - VECTOR OF FIXED EFFECTS PARAMETERS   *********
         TH 1      TH 2      TH 3
         8.87E+01  1.73E+02  3.63E+00

 OMEGA - COV MATRIX FOR RANDOM EFFECTS - ETAS  ********
            ETA1      ETA2
 ETA1
+        2.69E-02
 ETA2
+        0.00E+00  4.87E+00

 SIGMA - COV MATRIX FOR RANDOM EFFECTS - EPSILONS  ****
            EPS1      EPS2
 EPS1
+        9.92E-01
 EPS2
+        0.00E+00  1.04E+02

 OMEGA - CORR MATRIX FOR RANDOM EFFECTS - ETAS  *******
            ETA1      ETA2
 ETA1
+        1.64E-01
 ETA2
+        0.00E+00  2.21E+00

 SIGMA - CORR MATRIX FOR RANDOM EFFECTS - EPSILONS  ***
            EPS1      EPS2
 EPS1
+        9.96E-01
 EPS2
+        0.00E+00  1.02E+01

 ********************               FIRST ORDER CONDITIONAL ESTIMATION WITH INTERACTION              ********************
 ********************                            STANDARD ERROR OF ESTIMATE                          ********************

 THETA - VECTOR OF FIXED EFFECTS PARAMETERS   *********
         TH 1      TH 2      TH 3
         1.28E+01  3.45E+01  2.80E+00

 OMEGA - COV MATRIX FOR RANDOM EFFECTS - ETAS  ********
            ETA1      ETA2
 ETA1
+        2.08E-02
 ETA2
+       .........  3.68E+00

 SIGMA - COV MATRIX FOR RANDOM EFFECTS - EPSILONS  ****
            EPS1      EPS2
 EPS1
+        1.53E-01
 EPS2
+       .........  2.97E+01

 OMEGA - CORR MATRIX FOR RANDOM EFFECTS - ETAS  *******
            ETA1      ETA2
 ETA1
+        6.35E-02
 ETA2
+       .........  8.33E-01

 SIGMA - CORR MATRIX FOR RANDOM EFFECTS - EPSILONS  ***
            EPS1      EPS2
 EPS1
+        7.66E-02
 EPS2
+       .........  1.46E+00

 ********************               FIRST ORDER CONDITIONAL ESTIMATION WITH INTERACTION              ********************
 ********************                          COVARIANCE MATRIX OF ESTIMATE                         ********************

            TH 1      TH 2      TH 3      OM11      OM12      OM22      SG11      SG12      SG22
 TH 1
+        1.65E+02
 TH 2
+        4.05E+02  1.19E+03
 TH 3
+        1.12E+01  2.21E+01  7.81E+00
 OM11
+       -5.34E-02 -3.65E-01  2.46E-04  4.34E-04
 OM12
+       ......... ......... ......... ......... .........
 OM22
+        1.46E+01  1.96E+01  9.72E+00  1.04E-02 .........  1.35E+01
 SG11
+       -1.27E+00 -3.66E+00 -1.19E-01  9.88E-05 ......... -1.08E-01  2.33E-02
 SG12
+       ......... ......... ......... ......... ......... ......... ......... .........
 SG22
+       -4.06E+01 -2.39E+02 -2.61E+01  3.22E-01 ......... -3.01E+01 -6.72E-01 .........  8.81E+02

 ********************               FIRST ORDER CONDITIONAL ESTIMATION WITH INTERACTION              ********************
 ********************                          CORRELATION MATRIX OF ESTIMATE                        ********************

            TH 1      TH 2      TH 3      OM11      OM12      OM22      SG11      SG12      SG22
 TH 1
+        1.28E+01
 TH 2
+        9.15E-01  3.45E+01
 TH 3
+        3.11E-01  2.29E-01  2.80E+00
 OM11
+       -2.00E-01 -5.08E-01  4.22E-03  2.08E-02
 OM12
+       ......... ......... ......... ......... .........
 OM22
+        3.10E-01  1.54E-01  9.45E-01  1.35E-01 .........  3.68E+00
 SG11
+       -6.50E-01 -6.96E-01 -2.79E-01  3.11E-02 ......... -1.93E-01  1.53E-01
 SG12
+       ......... ......... ......... ......... ......... ......... ......... .........
 SG22
+       -1.07E-01 -2.33E-01 -3.15E-01  5.21E-01 ......... -2.76E-01 -1.48E-01 .........  2.97E+01
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 #CPUT: Total CPU Time in Seconds,        4.266
