Sun 01/15/2017
06:03 PM
;Model Desc: basic two cmt additive shift trt cl random vc cl q
;Project Name: raltest
;Project ID: NO PROJECT DESCRIPTION

;Project ID: NO PROJECT DESCRIPTION

$PROB RUN# analysis21
$INPUT C ID TREAT TIME DV AMT EVID sex race weight height age HC
$DATA RAL_FOR_NONMEM.CSV IGNORE=C
$SUBROUTINES ADVAN4 TRANS4
$PK
   TVCL=THETA(1)
   CL=TVCL*EXP(ETA(1)) + THETA(6)*TREAT
   TVV2=THETA(2)
   V2=TVV2*EXP(ETA(2))*EXP(THETA(7)*TREAT)
   TVQ=THETA(3)
   Q=TVQ*EXP(ETA(3))
   TVV3=THETA(4)
   V3=TVV3
   TVKA=THETA(5)*EXP(ETA(4))
   KA=TVKA
   S2=V2

$ERROR
   Y = F + F*ERR(1)
 IPRE=F

$EST METHOD=1 INTERACTION PRINT=5 MAX=9999 SIG=3    MSFO=analysis21.msf
$THETA
  (0, 104);[CL]
  (0, 102);[V2]
  (0, 14.5);[Q]
  (0, 668);[V3]
  (0, 0.481);[KA]
  50;[trt_cl]
  -2;[trt_vc]
$OMEGA
  0.04 ;[P] omega(1,1)
  0.04 ;[P] omega(2,2)
  0.04 ;[P] omega(3,3)
  0.04 ;[P] omega(4,4)
$SIGMA
  0.04 ;[P] sigma(1,1)
$COV
$TABLE ID TIME ONEHEADER NOPRINT FILE=analysis21.tab

NM-TRAN MESSAGES
 WARNINGS AND ERRORS (IF ANY) FOR PROBLEM    1
 (WARNING  2) NM-TRAN INFERS THAT THE DATA ARE POPULATION.

1NONLINEAR MIXED EFFECTS MODEL PROGRAM (NONMEM) VERSION 7.3.0
 ORIGINALLY DEVELOPED BY STUART BEAL, LEWIS SHEINER, AND ALISON BOECKMANN
 CURRENT DEVELOPERS ARE ROBERT BAUER, ICON DEVELOPMENT SOLUTIONS,
 AND ALISON BOECKMANN. IMPLEMENTATION, EFFICIENCY, AND STANDARDIZATION
 PERFORMED BY NOUS INFOSYSTEMS.
 PROBLEM NO.:         1
 RUN# analysis21
 TOT. NO. OF OBS RECS:      311
 TOT. NO. OF INDIVIDUALS:     12
 TWO COMPARTMENT MODEL WITH FIRST-ORDER ABSORPTION (ADVAN4)
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 #TBLN:      1
 #METH: First Order Conditional Estimation with Interaction
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
0PRED EXIT CODE = 1
0INDIVIDUAL NO.       1   ID= 6.00100000000000E+03   (WITHIN-INDIVIDUAL) DATA REC NO.  15
 THETA=
  1.03E+02   1.02E+02   1.44E+01   6.66E+02   4.82E-01  -1.00E+02  -6.54E-01
 ETA=
 -2.55E-02  -5.15E-02   3.76E-01   6.38E-02
 OCCURS DURING SEARCH FOR ETA AT A NONZERO VALUE OF ETA
 ERROR IN TRANS4 ROUTINE: CL  IS NEGATIVE
0PROGRAM TERMINATED BY OBJ
 MESSAGE ISSUED FROM ESTIMATION STEP

 #TERM:

 #TERE:
 Elapsed estimation time in seconds:     0.14
 #CPUT: Total CPU Time in Seconds,        0.141
