Fri 01/20/2017
01:06 AM
;Model Desc: basic two cmt random ka vc vp cl q
;Project Name: raltest
;Project ID: NO PROJECT DESCRIPTION

;Project ID: NO PROJECT DESCRIPTION

$PROB RUN# analysis3
$INPUT C ID TREAT TIME DV AMT EVID sex race weight height age HC
$DATA RAL_FOR_NONMEM.CSV IGNORE=C
$SUBROUTINES ADVAN4 TRANS4
$PK
   TVCL=THETA(1)
   CL=TVCL*EXP(ETA(1))
   TVV2=THETA(2)
   V2=TVV2*EXP(ETA(2))
   TVQ=THETA(3)
   Q=TVQ*EXP(ETA(3))
   TVV3=THETA(4)
   V3=TVV3*EXP(ETA(4))
   TVKA=THETA(5)
   KA=TVKA*EXP(ETA(5))
   S2=V2

$ERROR
   Y = F + F*ERR(1)+ERR(2)
 IPRE=F

$EST METHOD=1 INTERACTION PRINT=5 MAX=9999 SIG=3    MSFO=analysis3.msf
$THETA
  (0, 64);[CL]
  (0, 138);[V2]
  (0, 9.3);[Q]
  (0, 143);[V3]
  (0, 0.65);[KA]
$OMEGA
  0.04 ;[P] omega(1,1)
  0.04 ;[P] omega(2,2)
  0.04 ;[P] omega(3,3)
  0.04 ;[P] omega(4,4)
  0.04 ;[P] omega(5,5)
$SIGMA
  0.04 ;[P] sigma(1,1)
  0.04 ;[A] sigma(2,2)

$TABLE ID TIME ONEHEADER NOPRINT FILE=analysis3.tab

NM-TRAN MESSAGES
 WARNINGS AND ERRORS (IF ANY) FOR PROBLEM    1
 (WARNING  2) NM-TRAN INFERS THAT THE DATA ARE POPULATION.

1NONLINEAR MIXED EFFECTS MODEL PROGRAM (NONMEM) VERSION 7.3.0
 ORIGINALLY DEVELOPED BY STUART BEAL, LEWIS SHEINER, AND ALISON BOECKMANN
 CURRENT DEVELOPERS ARE ROBERT BAUER, ICON DEVELOPMENT SOLUTIONS,
 AND ALISON BOECKMANN. IMPLEMENTATION, EFFICIENCY, AND STANDARDIZATION
 PERFORMED BY NOUS INFOSYSTEMS.
 PROBLEM NO.:         1
 RUN# analysis3
 TOT. NO. OF OBS RECS:      311
 TOT. NO. OF INDIVIDUALS:     12
 TWO COMPARTMENT MODEL WITH FIRST-ORDER ABSORPTION (ADVAN4)
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 #TBLN:      1
 #METH: First Order Conditional Estimation with Interaction
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
 #TERM:
0MINIMIZATION SUCCESSFUL
 NO. OF FUNCTION EVALUATIONS USED:      564
 NO. OF SIG. DIGITS IN FINAL EST.:  3.4
0PARAMETER ESTIMATE IS NEAR ITS BOUNDARY
 THIS MUST BE ADDRESSED BEFORE THE COVARIANCE STEP CAN BE IMPLEMENTED

 ETABAR IS THE ARITHMETIC MEAN OF THE ETA-ESTIMATES,
 AND THE P-VALUE IS GIVEN FOR THE NULL HYPOTHESIS THAT THE TRUE MEAN IS 0.

 ETABAR:        -5.3417E-03  2.2673E-02 -1.6130E-02  3.5661E-07  1.3850E-02
 SE:             1.5409E-01  1.1666E-01  1.9450E-01  1.2646E-06  2.9454E-02
 N:                      12          12          12          12          12

 P VAL.:         9.7235E-01  8.4591E-01  9.3391E-01  7.7795E-01  6.3820E-01

 ETAshrink(%):   1.0000E-10  1.8644E+01  1.0000E-10  9.9771E+01  3.5793E+01
 EBVshrink(%):   1.9928E+00  2.0854E+01  5.1723E+00  9.9677E+01  4.0059E+01
 EPSshrink(%):   2.7375E+00  2.7375E+00

 #TERE:
 Elapsed estimation time in seconds:     5.55

 ********************               FIRST ORDER CONDITIONAL ESTIMATION WITH INTERACTION              ********************
 #OBJT:**************                       MINIMUM VALUE OF OBJECTIVE FUNCTION                      ********************
 #OBJV:********************************************     3270.871       **************************************************

 ********************               FIRST ORDER CONDITIONAL ESTIMATION WITH INTERACTION              ********************
 ********************                             FINAL PARAMETER ESTIMATE                           ********************

 THETA - VECTOR OF FIXED EFFECTS PARAMETERS   *********
         TH 1      TH 2      TH 3      TH 4      TH 5
         1.04E+02  1.07E+02  1.50E+01  6.62E+02  5.11E-01

 OMEGA - COV MATRIX FOR RANDOM EFFECTS - ETAS  ********
            ETA1      ETA2      ETA3      ETA4      ETA5
 ETA1
+        2.97E-01
 ETA2
+        0.00E+00  2.69E-01
 ETA3
+        0.00E+00  0.00E+00  4.94E-01
 ETA4
+        0.00E+00  0.00E+00  0.00E+00  4.00E-06
 ETA5
+        0.00E+00  0.00E+00  0.00E+00  0.00E+00  2.75E-02

 SIGMA - COV MATRIX FOR RANDOM EFFECTS - EPSILONS  ****
            EPS1      EPS2
 EPS1
+        5.84E-01
 EPS2
+        0.00E+00  4.00E-06

 OMEGA - CORR MATRIX FOR RANDOM EFFECTS - ETAS  *******
            ETA1      ETA2      ETA3      ETA4      ETA5
 ETA1
+        5.45E-01
 ETA2
+        0.00E+00  5.19E-01
 ETA3
+        0.00E+00  0.00E+00  7.03E-01
 ETA4
+        0.00E+00  0.00E+00  0.00E+00  2.00E-03
 ETA5
+        0.00E+00  0.00E+00  0.00E+00  0.00E+00  1.66E-01

 SIGMA - CORR MATRIX FOR RANDOM EFFECTS - EPSILONS  ***
            EPS1      EPS2
 EPS1
+        7.64E-01
 EPS2
+        0.00E+00  2.00E-03
 #CPUT: Total CPU Time in Seconds,        5.188
