Sun 01/15/2017
04:42 PM
;Model Desc: basic two cmt random ka vc cl q
;Project Name: raltest
;Project ID: NO PROJECT DESCRIPTION

;Project ID: NO PROJECT DESCRIPTION

$PROB RUN# analysis4
$INPUT C ID TREAT TIME DV AMT EVID sex race weight height age HC
$DATA RAL_FOR_NONMEM.CSV IGNORE=C
$SUBROUTINES ADVAN4 TRANS4
$PK
   TVCL=THETA(1)
   CL=TVCL
   TVV2=THETA(2)
   V2=TVV2*EXP(ETA(1))
   TVQ=THETA(3)
   Q=TVQ*EXP(ETA(2))
   TVV3=THETA(4)
   V3=TVV3*EXP(ETA(3))
   TVKA=THETA(5)
   KA=TVKA*EXP(ETA(4))
   S2=V2

$ERROR
   Y = F + F*ERR(1)+ERR(2)
 IPRE=F

$EST METHOD=1 INTERACTION PRINT=5 MAX=9999 SIG=3    MSFO=analysis4.msf
$THETA
  (0, 64);[CL]
  (0, 138);[V2]
  (0, 9.3);[Q]
  (0, 143);[V3]
  (0, 0.65);[KA]
$OMEGA
  0.04 ;[P] omega(1,1)
  0.04 ;[P] omega(2,2)
  0.04 ;[P] omega(3,3)
  0.04 ;[P] omega(4,4)
$SIGMA
  0.04 ;[P] sigma(1,1)
  0.04 ;[A] sigma(2,2)
$COV
$TABLE ID TIME ONEHEADER NOPRINT FILE=analysis4.tab

NM-TRAN MESSAGES
 WARNINGS AND ERRORS (IF ANY) FOR PROBLEM    1
 (WARNING  2) NM-TRAN INFERS THAT THE DATA ARE POPULATION.

1NONLINEAR MIXED EFFECTS MODEL PROGRAM (NONMEM) VERSION 7.3.0
 ORIGINALLY DEVELOPED BY STUART BEAL, LEWIS SHEINER, AND ALISON BOECKMANN
 CURRENT DEVELOPERS ARE ROBERT BAUER, ICON DEVELOPMENT SOLUTIONS,
 AND ALISON BOECKMANN. IMPLEMENTATION, EFFICIENCY, AND STANDARDIZATION
 PERFORMED BY NOUS INFOSYSTEMS.
 PROBLEM NO.:         1
 RUN# analysis4
 TOT. NO. OF OBS RECS:      311
 TOT. NO. OF INDIVIDUALS:     12
 TWO COMPARTMENT MODEL WITH FIRST-ORDER ABSORPTION (ADVAN4)
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 #TBLN:      1
 #METH: First Order Conditional Estimation with Interaction
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
 #TERM:
0MINIMIZATION SUCCESSFUL
 HOWEVER, PROBLEMS OCCURRED WITH THE MINIMIZATION.
 REGARD THE RESULTS OF THE ESTIMATION STEP CAREFULLY, AND ACCEPT THEM ONLY
 AFTER CHECKING THAT THE COVARIANCE STEP PRODUCES REASONABLE OUTPUT.
 NO. OF FUNCTION EVALUATIONS USED:      785
 NO. OF SIG. DIGITS IN FINAL EST.:  3.3

 ETABAR IS THE ARITHMETIC MEAN OF THE ETA-ESTIMATES,
 AND THE P-VALUE IS GIVEN FOR THE NULL HYPOTHESIS THAT THE TRUE MEAN IS 0.

 ETABAR:         1.7938E-01  2.0171E-02 -8.5601E-02  1.6563E-02
 SE:             5.3875E-01  1.1610E-01  2.5444E-01  8.6127E-02
 N:                      12          12          12          12

 P VAL.:         7.3917E-01  8.6207E-01  7.3655E-01  8.4750E-01

 ETAshrink(%):   2.3826E+01  1.8579E+01  5.7581E+00  3.1725E+01
 EBVshrink(%):   2.0708E+01  1.6850E+01  1.0761E+01  3.2024E+01
 EPSshrink(%):   1.7552E+00  1.7552E+00

 #TERE:
 Elapsed estimation time in seconds:    15.07
0R MATRIX ALGORITHMICALLY NON-POSITIVE-SEMIDEFINITE
 BUT NONSINGULAR
0R MATRIX IS OUTPUT
0COVARIANCE STEP ABORTED
 Elapsed covariance time in seconds:     6.27

 ********************               FIRST ORDER CONDITIONAL ESTIMATION WITH INTERACTION              ********************
 #OBJT:**************                       MINIMUM VALUE OF OBJECTIVE FUNCTION                      ********************
 #OBJV:********************************************     3402.856       **************************************************

 ********************               FIRST ORDER CONDITIONAL ESTIMATION WITH INTERACTION              ********************
 ********************                             FINAL PARAMETER ESTIMATE                           ********************

 THETA - VECTOR OF FIXED EFFECTS PARAMETERS   *********
         TH 1      TH 2      TH 3      TH 4      TH 5
         7.43E+01  2.18E+01  7.51E+00  1.41E+02  7.52E-01

 OMEGA - COV MATRIX FOR RANDOM EFFECTS - ETAS  ********
            ETA1      ETA2      ETA3      ETA4
 ETA1
+        6.55E+00
 ETA2
+        0.00E+00  2.66E-01
 ETA3
+        0.00E+00  0.00E+00  9.54E-01
 ETA4
+        0.00E+00  0.00E+00  0.00E+00  2.08E-01

 SIGMA - COV MATRIX FOR RANDOM EFFECTS - EPSILONS  ****
            EPS1      EPS2
 EPS1
+        7.72E-01
 EPS2
+        0.00E+00  1.05E+00

 OMEGA - CORR MATRIX FOR RANDOM EFFECTS - ETAS  *******
            ETA1      ETA2      ETA3      ETA4
 ETA1
+        2.56E+00
 ETA2
+        0.00E+00  5.16E-01
 ETA3
+        0.00E+00  0.00E+00  9.77E-01
 ETA4
+        0.00E+00  0.00E+00  0.00E+00  4.56E-01

 SIGMA - CORR MATRIX FOR RANDOM EFFECTS - EPSILONS  ***
            EPS1      EPS2
 EPS1
+        8.79E-01
 EPS2
+        0.00E+00  1.02E+00
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 #CPUT: Total CPU Time in Seconds,       21.016
