Sun 01/15/2017
04:43 PM
;Model Desc: basic two cmt random ka vc cl q
;Project Name: raltest
;Project ID: NO PROJECT DESCRIPTION

;Project ID: NO PROJECT DESCRIPTION

$PROB RUN# analysis9
$INPUT C ID TREAT TIME DV AMT EVID sex race weight height age HC
$DATA RAL_FOR_NONMEM.CSV IGNORE=C
$SUBROUTINES ADVAN4 TRANS4
$PK
   TVCL=THETA(1)
   CL=TVCL*EXP(ETA(1))
   TVV2=THETA(2)
   V2=TVV2*EXP(ETA(2))
   TVQ=THETA(3)
   Q=TVQ*EXP(ETA(3))
   TVV3=THETA(4)
   V3=TVV3
   TVKA=THETA(5)
   KA=TVKA*EXP(ETA(4))
   S2=V2

$ERROR
   Y = F + F*ERR(1)
 IPRE=F

$EST METHOD=1 INTERACTION PRINT=5 MAX=9999 SIG=3    MSFO=analysis9.msf
$THETA
  (0, 64);[CL]
  (0, 138);[V2]
  (0, 9.3);[Q]
  (0, 143);[V3]
  (0, 0.65);[KA]
$OMEGA
  0.04 ;[P] omega(1,1)
  0.04 ;[P] omega(2,2)
  0.04 ;[P] omega(3,3)
  0.04 ;[P] omega(4,4)
$SIGMA
  0.04 ;[P] sigma(1,1)
$COV
$TABLE ID TIME ONEHEADER NOPRINT FILE=analysis9.tab

NM-TRAN MESSAGES
 WARNINGS AND ERRORS (IF ANY) FOR PROBLEM    1
 (WARNING  2) NM-TRAN INFERS THAT THE DATA ARE POPULATION.

1NONLINEAR MIXED EFFECTS MODEL PROGRAM (NONMEM) VERSION 7.3.0
 ORIGINALLY DEVELOPED BY STUART BEAL, LEWIS SHEINER, AND ALISON BOECKMANN
 CURRENT DEVELOPERS ARE ROBERT BAUER, ICON DEVELOPMENT SOLUTIONS,
 AND ALISON BOECKMANN. IMPLEMENTATION, EFFICIENCY, AND STANDARDIZATION
 PERFORMED BY NOUS INFOSYSTEMS.
 PROBLEM NO.:         1
 RUN# analysis9
 TOT. NO. OF OBS RECS:      311
 TOT. NO. OF INDIVIDUALS:     12
 TWO COMPARTMENT MODEL WITH FIRST-ORDER ABSORPTION (ADVAN4)
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 #TBLN:      1
 #METH: First Order Conditional Estimation with Interaction
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
 #TERM:
0MINIMIZATION SUCCESSFUL
 NO. OF FUNCTION EVALUATIONS USED:      421
 NO. OF SIG. DIGITS IN FINAL EST.:  3.5

 ETABAR IS THE ARITHMETIC MEAN OF THE ETA-ESTIMATES,
 AND THE P-VALUE IS GIVEN FOR THE NULL HYPOTHESIS THAT THE TRUE MEAN IS 0.

 ETABAR:        -5.3457E-03  2.2674E-02 -1.6137E-02  1.3849E-02
 SE:             1.5409E-01  1.1666E-01  1.9451E-01  2.9455E-02
 N:                      12          12          12          12

 P VAL.:         9.7233E-01  8.4590E-01  9.3388E-01  6.3821E-01

 ETAshrink(%):   1.0000E-10  1.8644E+01  1.0000E-10  3.5793E+01
 EBVshrink(%):   1.9928E+00  2.0854E+01  5.1721E+00  4.0059E+01
 EPSshrink(%):   2.7375E+00

 #TERE:
 Elapsed estimation time in seconds:     4.25
 Elapsed covariance time in seconds:     2.48

 ********************               FIRST ORDER CONDITIONAL ESTIMATION WITH INTERACTION              ********************
 #OBJT:**************                       MINIMUM VALUE OF OBJECTIVE FUNCTION                      ********************
 #OBJV:********************************************     3270.871       **************************************************

 ********************               FIRST ORDER CONDITIONAL ESTIMATION WITH INTERACTION              ********************
 ********************                             FINAL PARAMETER ESTIMATE                           ********************

 THETA - VECTOR OF FIXED EFFECTS PARAMETERS   *********
         TH 1      TH 2      TH 3      TH 4      TH 5
         1.04E+02  1.07E+02  1.50E+01  6.62E+02  5.11E-01

 OMEGA - COV MATRIX FOR RANDOM EFFECTS - ETAS  ********
            ETA1      ETA2      ETA3      ETA4
 ETA1
+        2.97E-01
 ETA2
+        0.00E+00  2.69E-01
 ETA3
+        0.00E+00  0.00E+00  4.94E-01
 ETA4
+        0.00E+00  0.00E+00  0.00E+00  2.75E-02

 SIGMA - COV MATRIX FOR RANDOM EFFECTS - EPSILONS  ****
            EPS1
 EPS1
+        5.84E-01

 OMEGA - CORR MATRIX FOR RANDOM EFFECTS - ETAS  *******
            ETA1      ETA2      ETA3      ETA4
 ETA1
+        5.45E-01
 ETA2
+        0.00E+00  5.19E-01
 ETA3
+        0.00E+00  0.00E+00  7.03E-01
 ETA4
+        0.00E+00  0.00E+00  0.00E+00  1.66E-01

 SIGMA - CORR MATRIX FOR RANDOM EFFECTS - EPSILONS  ***
            EPS1
 EPS1
+        7.64E-01

 ********************               FIRST ORDER CONDITIONAL ESTIMATION WITH INTERACTION              ********************
 ********************                            STANDARD ERROR OF ESTIMATE                          ********************

 THETA - VECTOR OF FIXED EFFECTS PARAMETERS   *********
         TH 1      TH 2      TH 3      TH 4      TH 5
         1.54E+01  2.02E+01  3.78E+00  1.19E+02  3.94E-02

 OMEGA - COV MATRIX FOR RANDOM EFFECTS - ETAS  ********
            ETA1      ETA2      ETA3      ETA4
 ETA1
+        9.10E-02
 ETA2
+       .........  1.16E-01
 ETA3
+       ......... .........  2.11E-01
 ETA4
+       ......... ......... .........  1.57E-02

 SIGMA - COV MATRIX FOR RANDOM EFFECTS - EPSILONS  ****
            EPS1
 EPS1
+        8.04E-02

 OMEGA - CORR MATRIX FOR RANDOM EFFECTS - ETAS  *******
            ETA1      ETA2      ETA3      ETA4
 ETA1
+        8.34E-02
 ETA2
+       .........  1.12E-01
 ETA3
+       ......... .........  1.50E-01
 ETA4
+       ......... ......... .........  4.73E-02

 SIGMA - CORR MATRIX FOR RANDOM EFFECTS - EPSILONS  ***
            EPS1
 EPS1
+        5.26E-02

 ********************               FIRST ORDER CONDITIONAL ESTIMATION WITH INTERACTION              ********************
 ********************                          COVARIANCE MATRIX OF ESTIMATE                         ********************

            TH 1      TH 2      TH 3      TH 4      TH 5      OM11      OM12      OM13      OM14      OM22      OM23      OM24
             OM33      OM34      OM44      SG11
 TH 1
+        2.38E+02
 TH 2
+        7.14E+01  4.07E+02
 TH 3
+        3.01E+01  9.08E+00  1.43E+01
 TH 4
+       -1.20E+02 -1.67E+02  2.66E+02  1.42E+04
 TH 5
+       -1.22E-01  8.12E-02  5.74E-02  3.45E-01  1.55E-03
 OM11
+       -2.42E-01 -8.36E-01 -2.85E-02  2.68E+00  4.69E-04  8.28E-03
 OM12
+       ......... ......... ......... ......... ......... ......... .........
 OM13
+       ......... ......... ......... ......... ......... ......... ......... .........
 OM14
+       ......... ......... ......... ......... ......... ......... ......... ......... .........
 OM22
+        6.73E-01  5.11E-01  9.07E-02  1.40E+00  7.65E-04  1.48E-03 ......... ......... .........  1.35E-02
 OM23
+       ......... ......... ......... ......... ......... ......... ......... ......... ......... ......... .........
 OM24
+       ......... ......... ......... ......... ......... ......... ......... ......... ......... ......... ......... .........
 OM33
+       -3.45E-01 -2.49E+00  2.46E-01  1.20E+01  2.51E-03  1.52E-02 ......... ......... .........  6.32E-03 ......... .........
          4.44E-02
 OM34
+       ......... ......... ......... ......... ......... ......... ......... ......... ......... ......... ......... .........
         ......... .........
 OM44
+       -7.20E-02 -7.24E-02 -8.35E-05 -3.02E-01  3.70E-04 -1.57E-04 ......... ......... .........  2.43E-04 ......... .........
          4.93E-04 .........  2.46E-04
 SG11
+       -5.90E-01  7.32E-01 -1.26E-01  1.25E-01  5.12E-04  2.14E-03 ......... ......... .........  8.44E-04 ......... .........
         -1.83E-03 ......... -3.15E-04  6.46E-03

 ********************               FIRST ORDER CONDITIONAL ESTIMATION WITH INTERACTION              ********************
 ********************                          CORRELATION MATRIX OF ESTIMATE                        ********************

            TH 1      TH 2      TH 3      TH 4      TH 5      OM11      OM12      OM13      OM14      OM22      OM23      OM24
             OM33      OM34      OM44      SG11
 TH 1
+        1.54E+01
 TH 2
+        2.30E-01  2.02E+01
 TH 3
+        5.16E-01  1.19E-01  3.78E+00
 TH 4
+       -6.53E-02 -6.95E-02  5.90E-01  1.19E+02
 TH 5
+       -2.00E-01  1.02E-01  3.86E-01  7.35E-02  3.94E-02
 OM11
+       -1.73E-01 -4.55E-01 -8.28E-02  2.47E-01  1.31E-01  9.10E-02
 OM12
+       ......... ......... ......... ......... ......... ......... .........
 OM13
+       ......... ......... ......... ......... ......... ......... ......... .........
 OM14
+       ......... ......... ......... ......... ......... ......... ......... ......... .........
 OM22
+        3.75E-01  2.18E-01  2.06E-01  1.01E-01  1.67E-01  1.40E-01 ......... ......... .........  1.16E-01
 OM23
+       ......... ......... ......... ......... ......... ......... ......... ......... ......... ......... .........
 OM24
+       ......... ......... ......... ......... ......... ......... ......... ......... ......... ......... ......... .........
 OM33
+       -1.06E-01 -5.87E-01  3.09E-01  4.80E-01  3.03E-01  7.94E-01 ......... ......... .........  2.58E-01 ......... .........
          2.11E-01
 OM34
+       ......... ......... ......... ......... ......... ......... ......... ......... ......... ......... ......... .........
         ......... .........
 OM44
+       -2.97E-01 -2.29E-01 -1.41E-03 -1.62E-01  6.00E-01 -1.10E-01 ......... ......... .........  1.33E-01 ......... .........
          1.49E-01 .........  1.57E-02
 SG11
+       -4.76E-01  4.52E-01 -4.14E-01  1.31E-02  1.62E-01  2.92E-01 ......... ......... .........  9.03E-02 ......... .........
         -1.08E-01 ......... -2.50E-01  8.04E-02
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 #CPUT: Total CPU Time in Seconds,        6.453
